# Измеритель импеданса
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R := [115.7; 923.4; 8067]
C := 1.993*10^-12
tg(δ) := 0.039
ΔR := 0.15 + 0.01*(1000 - R)/R
dR := ΔR*R/100  # ΔR пишем в процентах
δ1 := (0.15 + 0.01*(16*10^-12 - C)/C)*sqrt(1 + tg(δ)^2)
# в последствии делим на 100%
δ1 = 0.220448  # %
ΔR = [0.22643; 0.15083; 0.14124]
dR := [0.26; 1.38; 17.8]
ΔС := 0.22*1.993*10^-12/100 = 4.3846e-15
# Цифровой вольтметр | C = 1.993+-0.004 пФ
R := [115.7; 923; 8050]
dR := 0.002*R + 0.1
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L := 195.4*10^-3
tg(δ) := 0.015
dR = [0.3314; 1.946; 16.2]
# Электронный вольтметр
δ11 := (0.15 + 0.01*(160*10^-3 - L)/L)*sqrt(1 + tg(δ)^2)
dR1 := 120*2.5/100*50/27
R := [120; 900; 8000]
L := [27; 24; 22]
δ11 = 0.148205  # %
ΔL := 0.148*195.4*10^-3/100 = 0.000289192
dR2 := 900*2.5/100*50/24
# L = 195.4 +-0.3 мГн
dR3 := 8000*2.5/100*50/22
dR1 = 5.55556
dR2 = 46.875
dR3 = 454.545
