# Измеритель импеданса
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Q := 0.043
L := 117.3*10^-3
R := [115.8; 923.4; 8068]
C := 9.526*10^-9
tg(δ) := 0.014
# ΔR пишем в процентах
δ11 := (0.15 + 0.01*(160*10^-3 - L)/L)*sqrt(1 + tg(δ)^2)
ΔR := 0.15 + 0.01*(1000 - R)/R
dR := ΔR*R/100  # в последствии делим на 100%
δ1 := (0.15 + 0.01*(16*10^-9 - C)/C)*sqrt(1 + tg(δ)^2)
δ1 = 0.156812  # %
δ11 = 0.153655  # %
ΔR = [0.226356; 0.15083; 0.141239]
dR := [0.26; 1.38; 17.8]
ΔС := 0.157*9.526*10^-9/100 = 1.49558e-11
ΔL := 0.154*117*10^-3/100 = 0.00018018
# Цифровой вольтметр | 0
# C = 9526.0+-14.9 пФ | L = 117.30 +-0.18 мГн
R := [115.9; 922; 8050]
# Видимо второй способ | Видимо второй способ
dR := 0.002*R + 0.1
δ2 := (2.5*(1 + tg(δ)^2) + 16*10^-9/(C*(1 + tg(δ))))*10^-3 + (0.25*(Q + 1/Q) + 0.1*(16*10^-9)/(C*(Q + 1)))
δ22 := (2.5*(1 + tg(δ)^2) + 160*10^-3/(L*(1 + tg(δ))))*10^-3 + (0.25*(Q + 1/Q) + 0.1*(160*10^-3)/(L*(Q + 1)))
dR = [0.3318; 1.944; 16.2]
δ22 = 5.95933
δ2 = 5.9899
# Электронный вольтметр | Если как в методе
# Если как в методе
плюс - минус
(2.5*(1 + tg(δ)^2) + 160*10^-3/(L*(1 + tg(δ))))*10^-3 = 0.00384568
dR1 := 110*2.5/100*50/26
R := [110; 950; 8000]
L := [26; 24; 22]
плюс - минус
(2.5*(1 + tg(δ)^2) + 16*10^-9/(C*(1 + tg(δ))))*10^-3 = 0.00415691
плюс - минус
(0.25*(Q + 1/Q) + 0.1*(160*10^-3)/(L*(Q + 1))) = [5.82529; 5.82534; 5.8254]  # %
dR2 := 950*2.5/100*50/24
плюс - минус
0.25*(Q + 1/Q) + 0.1*(16*10^-9)/(C*(Q + 1)) = 5.98574  # %
dR3 := 8000*2.5/100*50/22
dR1 = 5.28846
dR2 = 49.4792
dR3 = 454.545
