C1 := 0.3074
C2 := -0.0136
y(x) := C1*e^(sqrt(2)*x) + C2*e^(-sqrt(2)*x) + sin(1.1*x)/3.21
y1(x) := d/dx(y(x))
1.1*y1(-0.5) = 0.600051
1/3.21 = 0.311526
0.6*y1(1) + 0.8*y(1) = 2.39995
M1 := 0.71792
A1 := 0.54546
A2 := 2.04546
1.1*A1 = 0.600006
M2 := 2.42907
M3 := 4.38556
0.6*A1 + 0.8*A1 + 0.8*A2 = 2.40001
M4 := 6.41971
integral((sin(1.1*x) - 2*A1*x - 2*A2)*cos(M1*(x + 0.5)), x = -0.5 .. 1) = -5.04351
integral((sin(1.1*x) - 2*A1*x - 2*A2)*cos(M2*(x + 0.5)), x = -0.5 .. 1) = 0.858193
integral((sin(1.1*x) - 2*A1*x - 2*A2)*cos(M3*(x + 0.5)), x = -0.5 .. 1) = -0.303715
integral((sin(1.1*x) - A1*x - A2)*cos(M4*(x + 0.5)), x = -0.5 .. 1) = 0.0435269
integral(cos(M4*(x + 0.5))^2, x = -0.5 .. 1) = 0.765508
integral(cos(M1*(x + 0.5))^2, x = -0.5 .. 1) = 1.04071
integral(cos(M2*(x + 0.5))^2, x = -0.5 .. 1) = 0.836827
integral(cos(M3*(x + 0.5))^2, x = -0.5 .. 1) = 0.78173
