δ1(t) :=
    1 if t ≥ 0
    0 if t < 0
i0(t) := 5*δ1(t) - 10*δ1(t - 4) + 5*δ1(t - 8) + 5*δ1(t - 16) - 10*δ1(t - 20) + 5*δ1(t - 24)
i0op(t) := 3.18*cos(0.39*t) + 3.18*cos(0.79*t - 1.57) + 1.06*cos(1.18*t - 3.14) + 0.64*cos(1.96*t) + 1.06*cos(2.36*t - 1.57)
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iH(t) := 1.18*cos(0.39*t - 0.22) + 0.42*cos(0.79*t - 2.38) + 0.07*cos(1.18*t - 4.19) + 0.02*cos(1.96*t - 1.26) + 0.02*cos(2.36*t - 2.88)
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