δ1(t) :=
    1 if t ≥ 0
    0 if t < 0
i(t) := (-2.32*e^(-0.531*t) + 0.686*e^(-0.039*t) + 1.632)*δ1(t)
u(t) :=
    (0.902*e^(-0.531*t) + (-5.15)*e^(-0.039*t) + 5.25) if t ≥ 0
    (0.902 + (-5.15) + 5.25) if t < 0
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i(∞) = 1.632
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u(∞) = 5.25
2.*харктеристики
h(t) := (0.237*e^(-0.312*t)*cos(0.039*t) - 1.874*e^(-0.312*t)*sin(0.039*t))*δ1(t)
h1(t) := (6.009*e^(-0.312*t)*sin(0.039*t))*δ1(t)
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iн(t) := 5*h1(t) - 10*h1(t - 4) + 5*h1(t - 8)
i0(t) := 5*δ1(t) - 10*δ1(t - 4) + 5*δ1(t - 8)
A(w) := 1056*w/sqrt((440 - 4455*w^2)^2 + (2778*w)^2)
Ф(w) :=
    (-atan(2778*w/(440 - 4455*w^2)) + π/2) if w < 0.314
    (-atan(2778*w/(440 - 4455*w^2)) + (-π/2)) if w > 0.314
x := 0
maxA := Maximize(A, x) = 0.31427
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w := 0, 0.02 .. 100
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ФС(w) := mod(-4*w + (π/2), 2*π)
АС(w) := sin(2*w)^2*20/w
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