H(s) := (1056*s)/(4455*s^2 + 2778*s + 440)
H(s) invlaplace → 32*e^(-463*t/1485)*cos(sqrt(3431)*t/1485)/135 - 14816*sqrt(3431)*e^(-463*t/1485)*sin(sqrt(3431)*t/1485)/463185
H(s)/s invlaplace → 352*sqrt(3431)*e^(-463*t/1485)*sin(sqrt(3431)*t/1485)/3431
32/135 = 0.237037
sqrt(3431)/1485 = 0.0394443
-463/1485 = -0.311785
14816*sqrt(3431)/463185 = 1.87364
(352*sqrt(3431))/3431 = 6.00942
