# 1.Результаты измерений
# 1.1. 6Ц5С
U[1] := 2.4  # В
U1a := [0; 3; 5; 6; 7; 20; 50; 80]
I1a := [0; 2; 4; 4.6; 5; 7; 11; 11]
U[3] := 6.3  # В
U[2] := 5  # В
U2a := [0; 6; 10; 14; 20]
I2a := [0; 12; 24; 36; 58]
U3a := [0; 4; 6; 8; 10; 12; 14; 18]
I3a := [0; 8; 12; 20; 26; 34; 40; 48]
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Uн := [1.2; 2.4; 3.8; 5; 6.3]
Iнач := [0; 0; 0.12; 0.4; 0.72]
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# 1.2. 6Н3П
U[21] := 0  # В
I21a := transpose([0, 1, 5, 6, 7, 8.6])
U21a := transpose([0, 20, 80, 100, 120, 148])
U[22] := -1  # В
U22a := transpose([0, 60, 88, 100, 128, 152])
I22a := transpose([0, 0.8, 2, 2.3, 4, 5.4])
U[23] := -2  # В
U23a := transpose([0, 80, 100, 120, 140, 156])
I23a := transpose([0, 0.2, 0.4, 1, 2, 2.6])
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Ua1 := 50  # В
Uc1 := transpose([0, -0.5, -1, -1.5, -2, -2.5, -3, -3.5, -4])
Ia1 := transpose([3.2, 1.5, 0.38, 0.1, 0.024, 0.016, 0.012, 0.001])
Ua2 := 100  # В
Ia2 := transpose([8.8, 6.4, 4.2, 2.4, 1.2, 0.6, 0.056, 0.028, 0.02])
Ua3 := 100  # В
Ia3 := transpose([16, 15.6, 10.4, 8.4, 6.4, 3.2, 2, 0.9, 0.5])
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# Обработка результатов
# 1. 6Ц5С
U1a := transpose([3, 5, 6, 7, 20, 50, 80])
G1 := transpose([0.38, 0.36, 0.31, 0.27, 0.08, 0.03, 0.02])
U2a := transpose([6, 10, 14, 20])
G2 := transpose([0.82, 0.76, 0.69, 0.65])
U3a := transpose([4, 6, 8, 10, 12, 14, 18])
G3 := transpose([1, 0.82, 0.88, 0.82, 0.82, 0.76, 0.63])
Gтеор := 0.871
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# Эмиссионные характеристики
Uн := transpose([0, 2.4, 5, 6.3])
Ia1 := transpose([0, 6, 24, 26])
Ia2 := transpose([0, 7, 56, 58])
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Uc := transpose([-4, -4.5, -5])
D := transpose([0.08, 0.05, 0.03])
m := 2
n := 5
A := predict(D, m, n)
i := -5, -4 .. m
j := -5, -4 .. n
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p1 := transpose([0.0755, 0.0472, 0.0405, 0.0359, 0.0322])
Uд1 := transpose([5.6, 22.4, 28, 33.6, 41.4])
p2 := transpose([0.0175, 0.0237, 0.0223, 0.0264, 0.0273])
Uд2 := transpose([12.8, 19.2, 22, 28.4, 33.9])
p3 := transpose([0.0046, 0.0063, 0.0115, 0.0179, 0.0195])
Uд3 := transpose([12.4, 16, 19.6, 23.2, 26.1])
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