He
Ui := 24.5
αi := 1.3*10^-22
σmax := 0.34*10^-20
Umax := 120
l := 2
e := 1.6*10^-19
# 1. линейная аппр.
σ1(U) := αi*(U - Ui)
2.
S0 := 0.88*10^-20
R := 13.6
β1 := 1
β2 := 1
σ(U) := 2.66*S0*l*R^2/Ui^2*β1*(U/Ui - 1)/(U/Ui)^2*ln(1.25*β2*U/Ui)
# 1.3
β1 := 1.11
β2 := 0.6
σ2(U) := 2.66*S0*l*R^2/Ui^2*β1*(U/Ui - 1)/(U/Ui)^2*ln(1.25*β2*U/Ui)
σ0 := [2*10^-22; 6*10^-22; 2*10^-21; 3*10^-21; 3.4*10^-21; 3*10^-21; 2.375*10^-21]
U0 := [27; 30; 50; 80; 120; 200; 300]
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2.
fM(U, We) := 2.07*U^0.5/We^1.5*exp(-1.55*U/We)
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3.
σ(U) := αi*(U - Ui)
σc(We) := integral(σ(U)*fM(U, We), U = Ui .. 1200)
σ1(U) := 2.66*S0*l*R^2/Ui^2*(U/Ui - 1)/(U/Ui)^2*ln(1.25*U/Ui)
σc1(We) := integral(σ1(U)*fM(U, We), U = Ui .. 1200)
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