Ar
A := 13.6
B := 235
γFe := 0.058
γPt := 0.03
γNi := 0.058
αp(Ep) := A*exp(-B/Ep)
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UвFe(pL) := B*pL/ln(A*pL/ln(1 + 1/γFe))
UвPt(pL) := B*pL/ln(A*pL/ln(1 + 1/γPt))
UвNi(pL) := B*pL/ln(A*pL/ln(1 + 1/γNi))
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A_Ne := 13.2
B_Ne := 245
A_Ar := 13.6
B_Ar := 235
A_H2 := 5
B_H2 := 130
γFe_Ar := 0.058
γFe_Ne := 0.022
γFe_H2 := 0.061
Uв_Ne(pL) := B_Ne*pL/ln(A_Ne*pL/ln(1 + 1/γFe_Ne))
Uв_Ar(pL) := B_Ar*pL/ln(A_Ar*pL/ln(1 + 1/γFe_Ar))
Uв_H2(pL) := B_H2*pL/ln(A_H2*pL/ln(1 + 1/γFe_H2))
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