# Обработка результатов
# Перечень используемых констант:
# Плотность металла (Cu):
d := 530  # кг/м3
# Константа Больцмана:
k := 1.38*10^-23  # Дж/К
# Валентность металла:
z := 1
# Число Авогадро:
Na := 6.02*10^23  # 1/моль
# Постоянная Планка:
h := 1.05*10^-34  # Дж*с
# Масса электрона:
m := 9.1*10^-31  # кг
# Атомная масса:
A := 0.0069  # кг/моль
# Температура Дебая:
θ := 448  # К
# Заряд электрона
e := 1.6*10^-19  # Кл
# Вывод температурной зависимости химического потенциала
n := d*Na*z/A  # концентрация свободных электронов
μ0 := h^2*(3*π^2*n)^(2/3)/(2*m)  # Химический потенциал при Т=0 К
# Температурная зависимость химического потенциала
μ1(Tx) := μ0*(1 - π^2*(k*Tx/μ0)^2/12)
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# Рис.1 Температурная зависимость химического потенциала
# Значения температур, при которых химический потенциал будет отличаться на 1% и 10%
sqrt(0.12)*μ0/(π*k) = 5968.04  # К
sqrt(1.2)*μ0/(π*k) = 18872.6  # К
T := 4
# Расчет плотности состояния, функции распределения Ферми-Дирака и распределение электронов по энергиям.
# Плотность состояния | Распределение Ферми-Дирака
f(E, T) := 1/(e^((E - μ1(T))/(k*T)) + 1)
N(E) := 1*(2*m/h^2)^(3/2)*sqrt(E)/(4*π^2)
# Распределение электронов по энергиям
n1(E, T) := N(E)*f(E, T)
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T := 1000
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# Рис.2 Графики полученных зависимостей при Т = 20 К
# Рис.3 Графики полученных зависимостей при Т = 1000 К
T := 0 .. 1000
# Концентрация, найденная путем интегрирования по всем заполненным состояниям
n2(T) := 2*integral(N(E)*f(E, T), E = 0 .. μ1(T) - 5*k*T) + 2*integral(N(E)*f(E, T), E = μ1(T) - 5*k*T .. μ1(T) + 5*k*T) + 2*integral(N(E)*f(E, T), E = μ1(T) + 5*k*T .. μ1(T) + 100*k*T)
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# Расчет длины свободного пробега электронов и температурной зависимости проводимости
v(Ty) := sqrt(2*μ1(Ty)/m)  # Скорость электронов
# Длина свободного пробега электронов с учетом рассеяния на фотонах
λ(Ty) := A^2*θ^2*k/(2*π*h^2*d*Na^2*Ty)
σ(Ty) := n*e^2*λ(Ty)/(m*v(Ty))  # Проводимость металла
# Рис.4 График сравнения зависимостей
ρ1(Ty) := 1/σ(Ty)  # Удельное сопротивление металла
ρ0 := 8.55*10^-8  # мкОм*см  # Удельное сопротивление K при Т = 273 К
α := 4*10^-3  # 1/град  # Термический коэффициент сопротивления
t0 := 273  # К  # Стандартная температура
ρ2(Ty) := ρ0*(1 + α*(Ty - t0))  # Температурная зависимость удельного сопротивления на основе справочных данных
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ρ2(300) - ρ1(300) = 6.49202e-8  # Вклад дефектного рассеяния в величину удельного сопротивления металла для Т = 300 К
# Рис.5 Температурные зависимости удельного сопротивления на основе справочных данных и с учетом только электронно-фотонного рассеяния
λ(300) = 3.30358e-8  # Длина свободного пробега при электрон-фотонном рассеянии
λ1 := 1/ρ2(300)*m*v(300)/(n*e^2)  # Длина свободного пробега на основе справочных данных
λ1 = 1.03967e-8  # Значение д.с.п. на основе справочных данных при Т = 300 К
λ2 := λ1*λ(300)/(λ(300) - λ1)  # Длина свободного пробега, связанная только с дефектным рассеянием
λ2 = 1.51713e-8  # Значение при Т = 300 К
# Зависимость удельного сопротоивления металлической пленки от ее толщины при различных вероятностях зеркального отражения
Λδ(δ, β) := 3/4*δ*(ln(λ1/δ) + 0.4228)*(1 + β)/(1 - β)*Φ(λ1 - δ) + λ1*(1 - 3*λ1/(8*δ))*(1/(1 - β)*Φ(δ - λ1))
σ3(Ty, δ, β) := n*e^2*Λδ(δ, β)/(m*v(Ty))
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# Вид зависимости, где
# δ - толщина пленки, β - доля отраженных от поверхности электронов
# Рис.6 Зависимость удельного сопротоивления металлической пленки от ее толщины при различных вероятностях зеркального отражения
