1.
T := 0.1 .. 10000
h := 1.054*10^-34
Na := 6.02*10^23
d := 0.86*10^3
A := 39*10^-3
z := 1
m := 9.11*10^-31
k := 1.38*10^-23
e := 1.6*10^-19
μ(T) := (h^2*(3*π^2*d*Na*z)^(2/3)/(2*m*A^(2/3))*(1 - π^2/12*(k*T*2*m*A^(2/3)/(h^2*(3*π^2*d*Na*z)^(2/3)))^2))/e
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2.
E := 0.1 .. 10
k := 8.617*10^-5
h := 6.59*10^-16
μ := 2.045
N(E) := 1/(4*π^2)*(2*m/h^2)^(3/2)*E^(1/2)
f(E) := 1/(exp((E - μ)/(k*4)) + 1)
n(E) := N(E)*f(E)
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