# Вводные данные
Концентрация
Температура
# Данные из таблицы
# Масса электрона и выраженные через неё эффективные массы для электронов и дырок
# Масса электрона и выраженные через неё эффективные массы для электронов и дырок
# Постоянные Планка и Больцмана | Постоянные Планка и Больцмана
2
# Донор
#
# Акцептор
ND := 7*10^16
T0 := 413
Eg0 := 1.17
a := 4.73*10^-4
b := 636
Eg(T) := Eg0 - a*T^2/(T + b)
h := 6.62*10^-34  # Дж*с  # Дж*с
h := 6.62*10^-34
g := 2
m0 := 9.11*10^-31  # кг  # кг  # Заменить mn и mp на значения из сообщения в беседе
4
NA := 0
k1 := 1.38*10^-23  # Дж/К  # Дж/К
k1 := 1.38*10^-23
E := 0.41
mn := 0.33*m0  # кг  # кг
Ed(T) := Eg(T)/2 - E
k := 8.617*10^-5  # эВ/К  # эВ/К
k := 8.617*10^-5
mp := 0.81*m0  # кг  # кг
Ea(T) := -Ed(T)
# 1 Задание  Донор  Акцептор
# Эта формула, только без члена с NA
# (NA=0)
# Эта формула, только без члена с ND
# (ND=0)
NC*e^((Ef - Ec)/kT) + NA/(1 + gA*e^((Ea - Ef)/kT))
ND*1/(1 + gD*e^((Ef - Ed)/kT)) + NV*e^((Ev - Ef)/kT)
# 2 Задание
E0 := 0
Ec(T) := Eg(T)/2
Ev(T) := -Eg(T)/2
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# При акцепторе Ed заменить на Ea
# В отчёте указать, чему равно T0
# 3 Задание
T := 0 .. 1000
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# При акцепторе Ed заменить на Ea
# 4 Задание
Nc(T) := 2*(2/h^2*π*mn*k1*T)^(3/2)
Nv(T) := 2*(2/h^2*π*mp*k1*T)^(3/2)
F := -1 .. 1
n(T, F) := Nc(T)*e^(-(Ec(T) - F)/(k*T))
p(T, F) := Nv(T)*e^((Ev(T) - F)/(k*T))
Ed(T) := Eg(T) - E
Ea(T) := E
Nd(T, F) := ND*1/(1 + g*e^((F - Ed(T))/(k*T)))
Na(T, F) := NA*1/(1 + g*e^(-(F - Ea(T))/(k*T)))
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# Если акцептор, то вместо n(T0,F) и Nd(T0,F)+p(T0,F) НА ГРАФИКЕ пишем p(T0,F) и Na(T0,F)+n(T0,F)
# (В самой лабе на рисунке F берётся положительный и нулю F соответствует потолок валентной зоны.
# Тут нулю F соответствует середина запрещённой зоны ибо формулы даны именно для такого расчёта как я понял. Причём при расчёте Ea и Ed надо брать такие Как всегда в методе насрано)
# Чтобы по графику приблизительно найти пересечение:
# 1) Кликаем по графику ПКМ и выбираем трассировка
# 2) Убираем галочку с пункта "Отслеживать точки данных" и тыкаем в пересечение
# 3) Х-координата есть уровень Ферми (при условии описанном выше)
Ed(T) := Eg(T)/2 - E
# Не спрашивайте
Ea(T) := -Ed(T)
# 5,6 Задание
Function(T, F) := ln(n(T, F) + Na(T, F)) - ln(p(T, F) + Nd(T, F))
Ef(T) := root(Function(T, F), F, -0.7, 0.7)
T := 0, 10 .. 1000
# Вычисленное значение
Ef(T0) = 0.0243526
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# Спиздил код
# Так и не понял, на кой хуй логарифмы (тем более у чела вообще десятичные стояли), но без них не считает)
# 3 Лаба
# 1 Задание
Nc(T) := 2*(2/h^2*π*mn*k1*T)^(3/2)
Nv(T) := 2*(2/h^2*π*mp*k1*T)^(3/2)
n(T, μ) := Nc(T)*e^(-(Ec(T) - μ)/(k*T))
p(T, μ) := Nv(T)*e^((Ev(T) - μ)/(k*T))
Na(T, μ, NA1) := NA1*1/(1 + g*e^(-(μ - Ea(T))/(k*T)))
# Убираете формулу в зависимости от варианта
# Донор => Убираете Na
# Акцептор => Убираете Nd
Nd(T, μ, ND1) := ND1*1/(1 + g*e^((μ - Ed(T))/(k*T)))
Function(T, μ, ND1, NA1) := ln(n(T, μ) + Na(T, μ, NA1)) - ln(p(T, μ) + Nd(T, μ, ND1))
# В Function удаляем ту функцию, что удалили ранее и удаляем зависимость от неё
Μ(T, ND1, NA1) := root(Function(T, μ, ND1, NA1), μ, -0.8, 0.8)  # Тут тоже
# И далее везде в Μ(T,ND1,NA1) и в функциях с Μ(T,ND1,NA1) нужно будет что-то удалять
# Пример
Nd(T, μ, ND1) := ND1*1/(1 + g*e^((μ - Ed(T))/(k*T)))
Function(T, μ, ND1) := ln(n(T, μ)) - ln(p(T, μ) + Nd(T, μ, ND1))
Μ(T, ND1) := root(Function(T, μ, ND1), μ, -0.8, 0.8)
T := 0, 1 .. 1000
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# Если акцептор, то вместо Ed(T) нужно вставить Ea(T)
# Задание 2
n(T, ND1, NA1) := Nc(T)*e^(-(Ec(T) - Μ(T, ND1, NA1))/(k*T))  # error: Эта функция допускает не более 2 аргументов, но применяется она к 3.  # Убираем ND1 или NA1
p(T, ND1, NA1) := Nv(T)*e^((Ev(T) - Μ(T, ND1, NA1))/(k*T))  # error: Эта функция допускает не более 2 аргументов, но применяется она к 3.
Nd(T, ND1) := ND1*1/(1 + g*e^((Μ(T, ND1) - Ed(T))/(k*T)))
Na(T, NA1) := NA1*1/(1 + g*e^(-(Μ(T, NA1) - Ea(T))/(k*T)))
# Убираете формулу в зависимости от варианта
# Донор => Убираете Na
# Акцептор => Убираете Nd
Nd0(T, ND1) := ND1 - Nd(T, ND1)
Na0(T, NA1) := NA1 - Na(T, NA1)
# Пример
n(T, ND1) := Nc(T)*e^(-(Ec(T) - Μ(T, ND1))/(k*T))
p(T, ND1) := Nv(T)*e^((Ev(T) - Μ(T, ND1))/(k*T))
Nd(T, ND1) := ND1*1/(1 + g*e^((Μ(T, ND1) - Ed(T))/(k*T)))
Nd0(T, ND1) := ND1 - Nd(T, ND1)
N := 10^16
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N := 10^19
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N := 10^22
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# 3 задание
μ77n := 45500
μ77p := 11600
pn := 2.5  # Берём из таблицы в лабе
μ300n := 1500
μ300p := 600
pp := 2.7
μ01n := μ300n/300^(-pn)
μ02n := μ77n/77^(-pn)
μ01p := μ300p/300^(-pp)
μ02p := μ77p/77^(-pp)
μ01n = 2.33827e9
μ02n = 2.36722e9
μ01p = 2.9267e9
μ02p = 1.43874e9
μ0n := (μ01n + μ02n)/20000
μ0p := (μ01p + μ02p)/20000
μ0n = 235274
μ0p = 218272
μl(T) := ((μ0n*T^(-pn))^-1 + (μ0p*T^(-pp))^-1)^-1  # Если не так, то виновата метода)
q := 1.6*10^-19
ε := 12  # Найдёте в инете для своего металла
ε0 := 8.85*10^-12
h1 := 1.054*10^-34
μI(T, ND1) := 8*sqrt(2)*(4*π*ε*ε0)^2*(k1*T)^(3/2)/(π^(3/2)*q^3*Nd(T, ND1)*mn^(1/2)*ln(1 + (12*π*ε*ε0*T*k1/(q^2*Nd(T, ND1)^(1/3)))^2))
# Акцептор
# Nd -> Na
# ND1 -> NA1
# mn -> mp
μN(T, ND1) := q^2*mn/(80*π*ε*ε0*h1^3*Nd0(T, ND1))
μ(T, ND1) := (μl(T)^-1 + μI(T, ND1)^-1 + μN(T, ND1)^-1)^-1
N := 10^22
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# 4 задание
σ(T, ND1) := q*(n(T, ND1)*μ0n*T^(-pn) + p(T, ND1)*μ0p*T^(-pp))
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