# 1 пункт
T := 500 .. 1500
R := 1.987
H_BaCO3 := -287060
H_BaO := -128600
H_CO2 := -94050
H_C := 0
S_BaCO3 := 26.8
S_BaO := 16.8
S_CO2 := 51.06
S_C := 1.37
C_BaCO3 := 20.4
C_BaO := 11.34
C_CO2 := 8.87
C_C := 2.04
a_BaCO3 := 21.5
a_BaO := 11.79
a_CO2 := 10.57
a_C := 4.03
b_BaCO3 := 0.01106
b_BaO := 0.00188
b_CO2 := 0.00210
b_C := 0.00114
c_BaCO3 := -391000
c_BaO := -88000
c_CO2 := -206000
c_C := -204000
H_CO := -26410
H_Cu := 0
H_CuO := -37230
S_CO := 47.22
S_Cu := 7.97
S_CuO := 10.19
C_CO := 6.96
C_Cu := 5.86
C_CuO := 10.11
a_CO := 6.79
a_Cu := 5.41
a_CuO := 11.53
b_CO := -0.00098
b_Cu := 0.0015
b_CuO := 0.00188
c_CO := -11000
c_CuO := -176000
# 2 пункт
H_2 := 2*H_CO - H_CO2 - H_C = 41230
H_3 := H_CuO + H_CO - H_Cu - H_CO2 = 30410
H_1 := H_BaO + H_CO2 - H_BaCO3 = 64410
S_2 := 2*S_CO - S_CO2 - S_C = 42.01
S_3 := S_CuO + S_CO - S_Cu - S_CO2 = -1.62
S_1 := S_BaO + S_CO2 - S_BaCO3 = 41.06
C_2 := 2*C_CO - C_CO2 - C_C = 3.01
C_3 := C_CuO + C_CO - C_Cu - C_CO2 = 2.34
C_1 := C_BaO + C_CO2 - C_BaCO3 = -0.19
a_2 := 2*a_CO - a_CO2 - a_C = -1.02
a_3 := a_CuO + a_CO - a_Cu - a_CO2 = 2.34
a_1 := a_BaO + a_CO2 - a_BaCO3 = 0.86
b_1 := b_BaO + b_CO2 - b_BaCO3 = -0.00708
b_2 := 2*b_CO + b_CO2 - b_C = -0.001
b_3 := b_CuO + b_CO - b_Cu - b_CO2 = -0.0027
c_1 := c_BaO + c_CO2 - c_BaCO3 = 97000
c_2 := 2*c_CO - c_CO2 - c_C = 388000
# 3
# пункт
G_11(T) := H_1 - S_1*T
G_12(T) := H_1 - S_1*T + C_1*T*(ln(T/298) + (298/T) - 1)
G_13(T) := H_1 - S_1*T - T*(a_1*(ln(T/298) + 298/T - 1) + b_1*(T/2 + 298^2/(2*T) - 298) + c_1*(T^-2/2 + 298^-1/(-T) - 298^-2/(-2)))
G_21(T) := H_2 - S_2*T
G_22(T) := H_2 - S_2*T + C_2*T*(ln(T/298) + (298/T) - 1)
G_23(T) := H_2 - S_2*T - T*(a_2*(ln(T/298) + 298/T - 1) + b_2*(T/2 + 298^2/(2*T) - 298) + c_2*(T^-2/2 + 298^-1/(-T) - 298^-2/(-2)))
G_31(T) := H_3 - S_3*T
G_32(T) := H_3 - S_3*T + C_3*T*(ln(T/298) + (298/T) - 1)
# 4 пункт
Kp_11(T) := exp(-G_11(T)/(R*T))
Kp_12(T) := exp(-G_12(T)/(R*T))
Kp_13(T) := exp(-G_13(T)/(R*T))
Kp_21(T) := exp(-G_21(T)/(R*T))
Kp_22(T) := exp(-G_22(T)/(R*T))
Kp_23(T) := exp(-G_23(T)/(R*T))
Kp_31(T) := exp(-G_31(T)/(R*T))
Kp_32(T) := exp(-G_32(T)/(R*T))
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# 5 пункт
P1_CO(T) := sqrt(Kp_11(T)*Kp_21(T))
P2_CO(T) := sqrt(Kp_12(T)*Kp_22(T))
P3_CO(T) := sqrt(Kp_13(T)*Kp_23(T))
P1_CO2(T) := Kp_11(T)
P2_CO2(T) := Kp_12(T)
P3_CO2(T) := Kp_13(T)
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6*пункт
G1(T) := R*T*(ln(P1_CO(T)/P1_CO2(T)) - ln(Kp_31(T)))
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G1(T) = [
    43047.5; 43049.6; 43051.7; 43053.8; 43055.9; 43058; 43060.1; 43062.2; 43064.3; 43066.4
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]
# 7 пункт
