j := 0, 1 .. 6
T[j] := 700, 800, 900, 1000, 1100, 1200, 1300
Ps := 5
R := 1.987
i := 0 .. 4
a[i] := 0.005, 0.02, 0.04, 0.06, 0.08
FT_H2[j] := 33.153, 33.715, 34.25, 34.76, 35.24, 35.69, 36.13
FT_H2O[j] := 47.406, 48.089, 48.749, 49.382, 49.991, 50.575, 51.136
FT_As2[j] := 59.60, 60.29, 60.95, 61.58, 62.17, 62.74, 63.28
FT_Ga2O[j] := 73.03, 74.07, 75.08, 76.04, 76.96, 77.83, 78.66
FT_Ga2O3[j] := 25.63, 27.38, 29.07, 30.71, 32.30, 33.82, 35.24
FT_Ga[j] := 19.90, 20.79, 21.57, 22.27, 22.90, 23.48, 24.01
FT_GaAs[j] := 16.27, 16.76, 17.20, 17.65, 18.10, 18.43, 18.88
H_H2 := 0
H_H2O := -57.8*10^3
H_As2 := 48*10^3
H_Ga2O := -19.7*10^3
H_Ga2O3 := -240*10^3
H_Ga := 1.335*10^3
H_GaAs := -17.7*10^3
# Kp1
H1 := H_Ga2O + H_As2 + H_H2 - 2*H_GaAs - H_H2O
H1 = 121500
FT1[j] := FT_Ga2O[j] + FT_As2[j] + FT_H2[j] - 2*FT_GaAs[j] - FT_H2O[j]
FT1[j] = [85.837; 86.466; 87.131; 87.698; 88.179; 88.825; 89.174]
Kp1[j] := exp(1/R*(FT1[j] - H1/T[j]))
# Kp2
H2 := H_Ga2O3*1/3 + H_As2*1/3 + H_H2 - 2/3*H_GaAs - H_H2O
FT2[j] := FT_Ga2O3[j]*1/3 + FT_As2[j]*1/3 + FT_H2[j] - 2/3*FT_GaAs[j] - FT_H2O[j]
Kp2[j] := exp(1/R*(FT2[j] - H2/T[j]))
# Kp3
H3 := H_Ga*2 + H_As2 - 2*H_GaAs
FT3[j] := FT_Ga[j]*2 + FT_As2[j] - 2*FT_GaAs[j]
Kp3[j] := exp(1/R*(FT3[j] - H3/T[j]))
α[i, j] := (Kp1[j]/(2*a[i]*Ps^2))*(sqrt(1 + 4*a[i]*Ps^2/Kp1[j]) - 1)
