# Температура диффузии
# доноров, К
Td := 1373
# Постоянная
# Больцмана, Дж/К
kb := 1.3807*10^-23
# Температура диффузии
# акцепторов, К
Ta := 1473
# Энергия активации Р, эВ
Ead := 3.7
# Энергия активации В, эВ
Eaa := 4.6
# Исходная концентрация
# примеси, см^-3
Cin := 5*10^16
# Постоянная
# диффузии Р, см^2/с
D0d := 10.5
# Время диффузии
# доноров, с
td := 2*3600
ta := 1*3600
# Постоянная
# диффузии В, см^2/с
D0a := 1.6*10^-9
# Время диффузии
# акцепторов, с
# Поверхностная плотность
# атомов В, см^-2
# Предельная
# растворимость P, см^-3(?)
Na := 7*10^14
Cmax := 10^21*1.3
# Глубина, см
x := 0, 0.0000001 .. 0.001
# Коэффициент диффузии, см^2/с
D(T, Ea, D0) := D0*exp(-Ea*1.6*10^-19/(kb*T))
# Суммарное распределение концентрации:
C0a := Na/sqrt(π*(D(Ta, Eaa, D0a)*ta + D(Ta, Ead, D0d)*td))
C0d := Cmax
C0a = 3.0067e18
C(x) := |C0d*erfc(x/(2*sqrt(D(Td, Ead, D0d)*td))) - C0a*exp(-x^2/(4*(D(Ta, Eaa, D0a)*ta + D(Ta, Ead, D0d)*td))) + Cin|
Ca(x) := C0a*exp(-x^2/(4*(D(Ta, Eaa, D0a)*ta + D(Ta, Ead, D0d)*td)))
Cd(x) := C0d*erfc(x/(2*sqrt(D(Td, Ead, D0d)*td)))
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# Глубина залегания переходов:
xj11 := sqrt(ln(C0d/C0a))/sqrt(1/(4*sqrt(D(Td, Ead, D0d)*td)) - 1/(4*(D(Ta, Eaa, D0a)*ta)))
xje := sqrt(ln(C0d/C0a))/sqrt((1/(2*sqrt(D(Td, Ead, D0d)*td)) + 0.3/xj11)^2 - 1/(4*(D(Ta, Eaa, D0a)*ta)))
xjk := 2*sqrt(D(Ta, Eaa, D0a)*ta + D(Ta, Ead, D0d)*td)*sqrt(ln(C0a/Cin))
xjk = 0.000531709
xje = 1.42648e-17 - 1.62662e-10i
