x := 0, 0.00001 .. 0.05
t1 := 60
t2 := 180
t3 := 600
Tz := 923  # K
Tp := 1123  # K
k := 1.38*10^-23
Ea := 0.53*(1.6*10^-19)
D0 := 1.2*10^-7
Cmax := 4*10^18
Cin := 0.5*10^17
Dz := D0*exp(-Ea/(k*Tz))
Dz = 1.54113e-10
Dp := D0*exp(-Ea/(k*Tp))
Cz(x, t) := Cmax*erfc(x/(2*sqrt(Dz*t)))
Cz(x, t1) = [
    4e18; 3.76552e18; 3.53231e18; 3.30161e18; 3.07461e18; 2.85247e18; 2.63626e18; 2.42694e18; 2.22539e18; 2.03238e18
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]
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Q(t) := 2*Cmax*sqrt((Dz*t)/π)
tp1 := 3600
tp2 := 7200
tp3 := 10800
Cp(x, tp) := Q(t1)/sqrt(π*Dp*tp)*exp(-x^2/(4*Dp*tp))
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Cp(x, tp) := Q(t2)/sqrt(π*Dp*tp)*exp(-x^2/(4*Dp*tp))
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