# Оксидный катод. Окисляемость металла (Сu-CuO).
# Газовая постоянная, кал/(моль*К)
R := 1.987
# ΔH0,298, кал/моль
H_C := 0
H_BaO := -133*10^3
H_BaCO3 := -287.3*10^3
H_CO := -26.4*10^3
H_CO2 := -94.1*10^3
H_Cu := 0
H_CuO := -39.5*10^3
# S0,298, кал/(моль*K)
S_C := 1.4
S_BaO := 16.8
S_BaCO3 := 26.8
S_CO := 47.1
S_CO2 := 51.1
S_Cu := 7.96
S_CuO := 10.2
# ΔCp,298, кал/(моль*K)
Cp_C := 2
Cp_BaO := 11.29
Cp_BaCO3 := 20.4
Cp_CO := 7
Cp_CO2 := 8.9
Cp_Cu := 5.86
Cp_CuO := 10.7
# коэффициент a
a_C := 4.1
a_BaO := 12.7
a_BaCO3 := 20.8
a_CO := 6.8
a_CO2 := 10.6
a_Cu := 5.41
a_CuO := 9.27
# коэффициент b
b_C := 1*10^-3
b_BaO := 1.1*10^-3
b_BaCO3 := 11.7*10^-3
b_CO := 1*10^-3
b_CO2 := 2.2*10^-3
b_Cu := 1.5*10^-3
b_CuO := 4.8*10^-3
# коэффициент c
c_C := -2.1*10^5
c_BaO := -2.*10^5
c_BaCO3 := -2.9*10^5
c_CO := -0.1*10^5
c_CO2 := -2.*10^5
I
HBaCO[3] := -287.06
HBaO := -128.6
HCO[2] := -94.06
ΔH11 := HBaO + HCO[2] - HBaCO[3] = 64.4
ΔH11*10^3 = 64400
SBaO := 16.8
SBaCO[3] := 26.8
SCO[2] := 51.06
ΔS11 := SBaO + SCO[2] - SBaCO[3] = 41.06
T := 500, 501 .. 1300
R := 1.98
ΔG11(T) := ΔH11*10^3 - T*ΔS11
kp11(T) := e^(-ΔG11(T)/(R*T))
# II приближение
ΔCp := Cp_CO2 + Cp_BaO - Cp_BaCO3 = -0.21
f(T) := ln(T/298) - 1 + 298/T
ΔG12(T) := ΔG11(T) - ΔCp*T*f(T)
kp12(T) := e^(-ΔG12(T)/(R*T))
# III приближение
Δa := a_CO2 + a_BaO - a_BaCO3
Δb := b_CO2 + b_BaO - b_BaCO3
Δc := c_CO2 + c_BaO - c_BaCO3
M0(T) := ln(T/298) - 1 + 298/T
M1(T) := (T/2 + 298^2/(2*T)) - 298/1
M2(T) := (T^-2/2 + 298^-1/(-1*T)) - 298^-2/(-2)
ΔG13(T) := ΔG11(T) - T*(M0(T)*Δa + M1(T)*Δb + M2(T)*Δc)
kp13(T) := e^(-ΔG13(T)/(R*T))
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