Ps := 5
R := 1.987
i := 0 .. 4
a[i] := 0.005, 0.02, 0.04, 0.06, 0.08
j := 0 .. 6
T[j] := 700, 800, 900, 1000, 1100, 1200, 1300
FT_H2[j] := 33.153, 33.715, 34.25, 34.76, 35.24, 35.69, 36.13
FT_H2O[j] := 47.406, 48.089, 48.749, 49.382, 49.991, 50.575, 51.136
FT_As2[j] := 59.60, 60.29, 60.95, 61.58, 62.17, 62.74, 63.28
FT_Ga2O[j] := 73.03, 74.07, 75.08, 76.04, 76.96, 77.83, 78.66
FT_Ga2O3[j] := 25.63, 27.38, 29.07, 30.71, 32.30, 33.82, 35.24
FT_Ga[j] := 19.90, 20.79, 21.57, 22.27, 22.90, 23.48, 24.01
FT_GaAs[j] := 16.27, 16.76, 17.20, 17.65, 18.10, 18.43, 18.88
H_H2 := 0
H_H2O := -57.8*10^3
H_As2 := 48*10^3
H_Ga2O := -19.7*10^3
H_Ga2O3 := -240*10^3
H_Ga := 1.335*10^3
H_GaAs := -17.7*10^3
# 1 реакция
FT1[j] := FT_Ga2O[j] + FT_H2[j] + FT_As2[j] - 2*FT_GaAs[j] - FT_H2O[j]
H1 := H_Ga2O + H_H2 + H_As2 - 2*H_GaAs - H_H2O
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kp1[j] := e^(1/R*(FT1[j] - H1/T[j]))
kp1[j] = [0; 5.05464e-15; 3.44645e-11; 4.09229e-8; 1.35294e-5; 0.00192439; 0.11558]
# 2 реакция
FT2[j] := FT_Ga2O3[j] + 3*FT_H2[j] + FT_As2[j] - 2*FT_GaAs[j] - 3*FT_H2O[j]
H2 := H_Ga2O3 + 3*H_H2 + H_As2 - 2*H_GaAs - 3*H_H2O
kp2[j] := e^(1/R*(FT2[j] - H2/T[j]))
kp2[j] = [0.000841333; 0.00661364; 0.0371334; 0.157233; 0.531543; 1.69201; 4.13168]
# 3 реакция
FT3[j] := 2*FT_Ga[j] + FT_As2[j] - 2*FT_GaAs[j]
H3 := 2*H_Ga + H_As2 - 2*H_GaAs
kp3[j] := e^(1/R*(FT3[j] - H3/T[j]))
kp3[j] = [5.48231e-13; 2.65424e-9; 2.13609e-6; 0.000464343; 0.0384303; 1.75268; 40.0504]
# Изотерма Вант-Гоффа
α1[i, j] := (kp1[j]/(2*a[i]*Ps^2))*(sqrt(1 + 4*a[i]*Ps^2/kp1[j]) - 1)
α2[i, j] := (kp2[j]/(2*a[i]*Ps^2))*(sqrt(1 + 4*a[i]*Ps^2/kp2[j]) - 1)
α3[i, j] := (kp3[j]/(2*a[i]*Ps^2))*(sqrt(1 + 4*a[i]*Ps^2/kp3[j]) - 1)
α2[i, j] = [
    0.0787443; 0.0401876; 0.0285881; 0.0234043; 0.0203009; 0.205082; 0.108586; 0.0780847; 0.064233; 0.0558753
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]
α3[i, j] = [
    2.09424e-6; 1.04712e-6; 7.40426e-7; 6.04555e-7; 5.2356e-7; 0.000145708; 7.28567e-5; 5.1518e-5; 4.20645e-5; 3.6429e-5
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]
α1[i, j] = [
    7.3043e-10; 3.65215e-10; 2.58246e-10; 2.10857e-10; 1.82608e-10; 2.0109e-7; 1.00545e-7; 7.1096e-8; 5.80496e-8; 5.02724e-8
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]
p_H2O[i, j] := Ps*(1 - α1[i, j])*a[i]/(1 + (1 + 2*α1[i, j])*a[i])
p_H2O[i, j] = [
    0.0248756; 0.0980392; 0.192308; 0.283019; 0.37037; 0.0248756; 0.0980392; 0.192308; 0.283019; 0.37037
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]
p_H2[i, j] := Ps*(1 + α1[i, j]*a[i])/(1 + (1 + 2*α1[i, j])*a[i])
p_H2[i, j] = [
    4.97512; 4.90196; 4.80769; 4.71698; 4.62963; 4.97512; 4.90196; 4.80769; 4.71698; 4.62963
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]
p_As2[i, j] := Ps*(α1[i, j]*a[i])/(1 + (1 + 2*α1[i, j])*a[i])
p_As2[i, j] = [
    1.81699e-11; 3.58054e-11; 4.96627e-11; 5.96765e-11; 6.76324e-11; 5.00223e-9; 9.85734e-9; 1.36723e-8; 1.64291e-8; 1.86194e-8
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]
ΔG2[i, j] := R*T[j]*(ln(p_As2[i, j]*p_H2[i, j]^3/p_H2O[i, j]^3) - ln(kp2[j]))
ΔG2[i, j] = [
    -2442.11; -7283.21; -9720.47; -11156.9; -12183.2; 2861.59; -2671.1; -5456.53; -7098.13; -8271.09
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]
ΔG3[i, j] := R*T[j]*(ln(p_As2[i, j]) - ln(kp3[j]))
ΔG3[i, j] = [
    4869.3; 5812.79; 6267.83; 6523.32; 6697.39; 1007.37; 2085.65; 2605.69; 2897.68; 3096.61
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]
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T0 := 746
T1 := 860
T2 := 934
T3 := 982
T4 := 1019
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T00 := 827
T11 := 855
T22 := 869
T33 := 879
T44 := 885
T3[i] := 827, 855, 869, 879, 885
T2[i] := 746, 860, 934, 982, 1019
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