R := 1.987
T := 800 .. 1500
H_SrCO3 := -294600
S_SrCO3 := 23.20
C_SrCO3 := 19.46
a_SrCO3 := 23.52
b_SrCO3 := 6.32*10^-3
c_SrCO3 := -5.08*10^5
H_SrO := -144440
S_SrO := 13.10
C_SrO := 10.64
a_SrO := 12.34
b_SrO := 1.12*10^-3
c_SrO := -1.81*10^5
H_CO2 := -94050
S_CO2 := 51.06
C_CO2 := 8.87
a_CO2 := 10.57
b_CO2 := 2.10*10^-3
c_CO2 := -2.06*10^5
H_MgCO3 := -261900
S_MgCO3 := 15.70
C_MgCO3 := 18.05
a_MgCO3 := 18.62
b_MgCO3 := 13.80*10^-3
c_MgCO3 := -4.16*10^5
H_MgO := -143810
S_MgO := 6.45
C_MgO := 9.03
a_MgO := 10.18
b_MgO := 1.74*10^-3
c_MgO := -1.48*10^5
H_C := 0
S_C := 1.37
C_C := 2.04
a_C := 4.03
b_C := 1.14*10^-3
c_C := -2.04*10^5
H_CO := -26410
S_CO := 47.22
C_CO := 6.96
a_CO := 6.79
b_CO := -0.98*10^-3
c_CO := -0.11*10^5
H_Al := 0
S_Al := 6.77
C_Al := 5.82
a_Al := 4.94
b_Al := 2.96*10^-3
H_Al2O3 := -400480
S_Al2O3 := 12.17
C_Al2O3 := 18.89
a_Al2O3 := 27.43
b_Al2O3 := 3.06*10^-3
c_Al2O3 := -8.47*10^5
# 2 реак | 3 реак | 4 реак
# 1 реак
H_1 := H_SrO + H_CO2 - H_SrCO3 = 56110
H_4 := H_Al2O3/3 + H_CO - 2*H_Al/3 - H_CO2 = -65853.3
H_3 := 2*H_CO - H_CO2 - H_C = 41230
H_2 := H_MgO + H_CO2 - H_MgCO3 = 24040
S_1 := S_SrO + S_CO2 - S_SrCO3 = 40.96
S_3 := 2*S_CO - S_CO2 - S_C = 42.01
S_2 := S_MgO + S_CO2 - S_MgCO3 = 41.81
S_4 := S_Al2O3/3 + S_CO - 2*S_Al/3 - S_CO2 = -4.29667
G_11(T) := H_1 - T*S_1
G_21(T) := H_2 - T*S_2
G_31(T) := H_3 - T*S_3
G_41(T) := H_4 - T*S_4
Kp_11(T) := exp(-G_11(T)/(R*T))
Kp_31(T) := exp(-G_31(T)/(R*T))
Kp_21(T) := exp(-G_21(T)/(R*T))
Kp_41(T) := exp(-G_41(T)/(R*T))
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p1_CO2(T) := Kp_11(T)
p12_CO2(T) := Kp_21(T)
p1_CO(T) := sqrt(Kp_11(T)*Kp_31(T))
p12_CO(T) := sqrt(Kp_21(T)*Kp_31(T))
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C_1 := C_SrO + C_CO2 - C_SrCO3 = 0.05
C_2 := C_MgO + C_CO2 - C_MgCO3 = -0.15
C_4 := C_Al2O3/3 + C_CO - 2*C_Al/3 - C_CO2 = 0.506667
C_3 := 2*C_CO - C_CO2 - C_C = 3.01
Tf(T) := T*(ln(T/298) + 298/T - 1)
G_22(T) := H_2 - T*S_2 - C_2*Tf(T)
G_42(T) := H_4 - T*S_4 - C_4*Tf(T)
G_12(T) := H_1 - T*S_1 - C_1*Tf(T)
G_32(T) := H_3 - T*S_3 - C_3*Tf(T)
Kp_12(T) := exp(-G_12(T)/(R*T))
Kp_22(T) := exp(-G_22(T)/(R*T))
Kp_42(T) := exp(-G_42(T)/(R*T))
Kp_32(T) := exp(-G_32(T)/(R*T))
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p2_CO2(T) := Kp_12(T)
p2_CO(T) := sqrt(Kp_12(T)*Kp_32(T))
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a_1 := a_SrO + a_CO2 - a_SrCO3 = -0.61
a_2 := a_MgO + a_CO2 - a_MgCO3 = 2.13
a_3 := 2*a_CO - a_CO2 - a_C = -1.02
b_1 := b_SrO + b_CO2 - b_SrCO3 = -0.0031
b_2 := b_MgO + b_CO2 - b_MgCO3 = -0.00996
b_3 := 2*b_CO - b_CO2 - b_C = -0.0052
c_1 := c_SrO + c_CO2 - c_SrCO3 = 121000
c_2 := c_MgO + c_CO2 - c_MgCO3 = 62000
c_3 := 2*c_CO - c_CO2 - c_C = 388000
M0(T) := ln(T/298) + 298/T - 1
M1(T) := T/2 + 298^2/(2*T) - 298/1
M2(T) := T^-2/(-2*(-1)) + 298^-1/(-1*T) - 298^-2/(-2)
G_13(T) := H_1 - T*S_1 - T*(M0(T)*a_1 + M1(T)*b_1 + M2(T)*c_1)
G_23(T) := H_2 - T*S_2 - T*(M0(T)*a_2 + M1(T)*b_2 + M2(T)*c_2)
G_33(T) := H_3 - T*S_3 - T*(M0(T)*a_3 + M1(T)*b_3 + M2(T)*c_3)
Kp_13(T) := exp(-G_13(T)/(R*T))
Kp_23(T) := exp(-G_23(T)/(R*T))
Kp_33(T) := exp(-G_33(T)/(R*T))
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p3_CO2(T) := Kp_13(T)
p3_CO(T) := sqrt(Kp_13(T)*Kp_33(T))
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ΔG(T) := R*T*(0.8*ln(p1_CO(T)/p2_CO2(T)) + 0.2*ln(p12_CO(T)/p12_CO2(T)) - ln(Kp_41(T)))
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T := 0 .. 1200
tз1 := 120
Nисх := 5*10^15
tр1 := 3600
D0 := 1.5
Tз := 650 + 273
tз2 := 300
Ea := 2.39
tр2 := 7200
Tр := 800 + 273
Cmax := 7*10^19
tз3 := 420
tр3 := 18000
k := 8.617*10^-5
Tmax := 800
D(T) := D0*exp(-Ea/(k*T))
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C1(x) := Cmax*erfc(x/(2*sqrt(D(Tз)*tз1)))
C2(x) := Cmax*erfc(x/(2*sqrt(D(Tз)*tз2)))
C3(x) := Cmax*erfc(x/(2*sqrt(D(Tз)*tз3)))
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D(Tр) = 8.91366e-12
Q1 := 2*Cmax*sqrt(D(Tз)*tз1/π)
Q1 = 3.16214e14
Q1/sqrt(π*D(Tр)*tр1) = 9.95924e17
Q2 := 2*Cmax*sqrt(D(Tз)*tз2/π)
Q2 = 4.99977e14
Q3 := 2*Cmax*sqrt(D(Tз)*tз3/π)
Q3 = 5.91581e14
C11(x) := Q1/sqrt(π*D(Tр)*tр1)*exp(-x^2/(4*D(Tр)*tр1))
C21(x) := Q2/sqrt(π*D(Tр)*tр1)*exp(-x^2/(4*D(Tр)*tр1))
C31(x) := Q3/sqrt(π*D(Tр)*tр1)*exp(-x^2/(4*D(Tр)*tр1))
C12(x) := Q1/sqrt(π*D(Tр)*tр2)*exp(-x^2/(4*D(Tр)*tр2))
C22(x) := Q2/sqrt(π*D(Tр)*tр2)*exp(-x^2/(4*D(Tр)*tр2))
C32(x) := Q3/sqrt(π*D(Tр)*tр2)*exp(-x^2/(4*D(Tр)*tр2))
C13(x) := Q1/sqrt(π*D(Tр)*tр3)*exp(-x^2/(4*D(Tр)*tр3))
C23(x) := Q2/sqrt(π*D(Tр)*tр3)*exp(-x^2/(4*D(Tр)*tр3))
C33(x) := Q3/sqrt(π*D(Tр)*tр3)*exp(-x^2/(4*D(Tр)*tр3))
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# tз1 | tз2 | tз3
x11 := 2*sqrt(D(Tр)*tр1*ln(Q1/sqrt(π*D(Tр)*tр1)/Nисх))
x12 := 2*sqrt(D(Tр)*tр1*ln(Q2/sqrt(π*D(Tр)*tр1)/Nисх))
x13 := 2*sqrt(D(Tр)*tр1*ln(Q3/sqrt(π*D(Tр)*tр1)/Nисх))
x21 := 2*sqrt(D(Tр)*tр2*ln(Q1/sqrt(π*D(Tр)*tр2)/Nисх))
x22 := 2*sqrt(D(Tр)*tр2*ln(Q2/sqrt(π*D(Tр)*tр2)/Nисх))
x23 := 2*sqrt(D(Tр)*tр2*ln(Q3/sqrt(π*D(Tр)*tр2)/Nисх))
x31 := 2*sqrt(D(Tр)*tр3*ln(Q1/sqrt(π*D(Tр)*tр3)/Nисх))
x32 := 2*sqrt(D(Tр)*tр3*ln(Q2/sqrt(π*D(Tр)*tр3)/Nисх))
x33 := 2*sqrt(D(Tр)*tр3*ln(Q3/sqrt(π*D(Tр)*tр3)/Nисх))
# tз1 | tз2 | tз3
tр1
x11 = 0.000824348
x12 = 0.000859277
x13 = 0.000871751
tр2
x21 = 0.001127
x22 = 0.00117802
x23 = 0.00119622
tр3
x31 = 0.00169744
x32 = 0.00178194
x33 = 0.00181199
