ε0 := 8.85*10^-12
μ0 := 4*π*10^-7
εr := 8.5
μr := 1
c := 3*10^8
a := 0.06
b := 0.04
m := 0 .. 4
n := 0 .. 3
c_ср := 3*10^8/sqrt(8.5) = 102899151
σ_Ag := 6.25*10^7
f_кр(m, n) := 1/(2*sqrt(ε0*μ0))*sqrt((m/a)^2 + (n/b)^2)
σ_Cu := 5.78*10^7
f_кр(0, n) = [0; 3.74829e9; 7.49658e9; 1.12449e10]
f_кр(1, n) = [2.49886e9; 4.50489e9; 7.90209e9; 1.15192e10]
f_кр(2, n) = [4.99772e9; 6.24715e9; 9.00977e9; 1.23055e10]
f_кр(3, n) = [7.49658e9; 8.38144e9; 1.06018e10; 1.35147e10]
f_кр(4, n) = [9.99545e9; 1.06751e10; 1.24943e10; 1.50451e10]
ω_кр(m, n) := 2*π*f_кр(m, n)
γ := -3*10^3 .. 3*10^3
ω(m, n, γ) := sqrt(γ^2/(ε0*εr*μ0*μr) + ω_кр(m, n)^2)
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f_кр_MgO := 1/(2*sqrt(ε0*εr*μ0*μr))*sqrt((2/a)^2 + (0/b)^2) = 1.7142e9
ω_кр_MgO := 2*π*f_кр_MgO
ω := 3*10^4, 3.5*10^7 .. 4*10^12
Zв_воздух(ω) := sqrt(μ0*ω^2/(ε0*(ω^2 - ω_кр(2, 0)^2)))
Zв_MgO(ω) := sqrt(μ0*μr*ω^2/((ε0*εr)*(ω^2 - ω_кр_MgO^2)))
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vф_воздух(ω) := c/sqrt(1 - (ω_кр(2, 0)/ω)^2)
vф_MgO(ω) := c/sqrt(εr*(1 - (ω_кр_MgO/ω)^2))
vгр_MgO(ω) := (c/sqrt(εr))*sqrt(1 - (ω_кр_MgO/ω)^2)  # ω
vгр_воздух(ω) := (c/sqrt(1))*sqrt(1 - (ω_кр(2, 0)/ω)^2)
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δ
δAg_ск(ω) := sqrt(2/(ω*μ0*σ_Ag))
δCu_ск(ω) := sqrt(2/(ω*μ0*σ_Cu))
Rпов_Ag(ω) := 1/(σ_Ag*δAg_ск(ω))
Rпов_Cu(ω) := 1/(σ_Cu*δCu_ск(ω))
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p := 1, 2 .. 17
f_рез_воздух(p) := 1/(2*sqrt(ε0*μ0*μr))*sqrt((2/a)^2 + (0/b)^2 + (p/(5*a))^2)
ω_рез(p) := 2*π*f_рез_воздух(p)
f_рез_воздух(p) = [5.02265e9; 5.0967e9; 5.21778e9; 5.38271e9; 5.58762e9; 5.8283e9; 6.1005e9; 6.40021e9; 6.72375e9; 7.06785e9; 7.42965e9; 7.80669e9; 8.19688e9; 8.59841e9; 9.00977e9; 9.42968e9; 9.85705e9]
k := π*2/a
δAg_ск(p) := sqrt(2/(ω_рез(p)*μ0*σ_Ag))
Rпов_Ag(p) := 1/(σ_Ag*δAg_ск(p))
Q(p) := (1/(ω_рез(p)*Rпов_Ag(p)))*(k^4/ε0)*(a*b*5*a/16)*(k^-4*(π*p/(5*a))^2*(π*2/a)^2 + 1)/(a*b*(π*2/a)^2 + b*5*a*(π*2/a)^2)
Q(p) = [6957.71; 7008.81; 7091.57; 7202.79; 7338.6; 7494.98; 7668.01; 7854.11; 8050.18; 8253.6; 8462.21; 8674.28; 8888.41; 9103.51; 9318.73; 9533.41; 9747.05]
