Tp := 1173
t1 := 60
tр1 := 3600
T := 0 .. 1500
T3 := 973
t2 := 180
tр2 := 7200
k := 1.38*10^-23
Ea := 0.53*1.6*10^-19
t3 := 420
tр3 := 10800
Cmax := 1*10^20
D0 := 1.2*10^-7
Cs := 5*10^16
D(T) := D0*exp(-Ea/(k*T))
Q1 := 2*Cs*sqrt(D(T3)*t1/π) = 6.43739e12
Q2 := 2*Cs*sqrt(D(T3)*t2/π) = 1.11499e13
Q3 := 2*Cs*sqrt(D(T3)*t3/π) = 1.70317e13
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C1(x) := Cs*erfc(x/(2*sqrt(D(T3)*t1)))
C2(x) := Cs*erfc(x/(2*sqrt(D(T3)*t2)))
C3(x) := Cs*erfc(x/(2*sqrt(D(T3)*t3)))
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C11(x) := Q1*exp((-x)^2/(-4*D(Tp)*tр1))/(π*D(Tp)*tр1)
C12(x) := Q1*exp(x^2/(-4*D(Tp)*tр2))/(π*D(Tp)*tр2)
C13(x) := Q1*exp((-x)^2/(-4*D(Tp)*tр3))/(π*D(Tp)*tр3)
C21(x) := Q2*exp((-x)^2/(-4*D(Tp)*tр1))/(π*D(Tp)*tр1)
C31(x) := Q3*exp((-x)^2/(-4*D(Tp)*tр1))/(π*D(Tp)*tр1)
C22(x) := Q2*exp(x^2/(-4*D(Tp)*tр2))/(π*D(Tp)*tр2)
C32(x) := Q3*exp(x^2/(-4*D(Tp)*tр2))/(π*D(Tp)*tр2)
C23(x) := Q2*exp((-x)^2/(-4*D(Tp)*tр3))/(π*D(Tp)*tр3)
C33(x) := Q3*exp((-x)^2/(-4*D(Tp)*tр3))/(π*D(Tp)*tр3)
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1.5*10^17
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2*10^17
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1.5*10^-2
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