c := 3*10^8  # [m/s]
ε0 := 8.85*10^-12  # [F/m]
μr := 1
μ0 := 4*π*10^-7  # [H/m]
εr := 25
a := 3.375*10^-2
b := 2.25*10^-2
l := 16.875*10^-2
fp(m, n, p) := c*sqrt((m/(2*a))^2 + (n/(2*b))^2 + (p/(2*l))^2)
fp(0, 1, 3) = 7.18022e9
fp(0, 1, 3) = 7.18022e9
fp(0, 3, 1) = 2.00197e10
fp(1, 0, 2) = 4.78681e9
fp(1, 0, 3) = 5.18307e9
fp(1, 0, 3) = 5.18307e9
fp(1, 3, 1) = 2.05072e10
fp(1, 1, 2) = 8.20719e9
fp(1, 1, 3) = 8.44444e9
fp(1, 1, 3) = 8.44444e9
fp(2, 3, 1) = 2.19044e10
fp(0, 2, 2) = 1.34513e10
fp(2, 0, 3) = 9.28027e9
fp(0, 2, 3) = 1.35974e10
fp(4, 2, 1) = 2.224e10
fp(2, 0, 2) = 9.06492e9
fp(5, 0, 1) = 2.224e10
fp(2, 0, 3) = 9.28027e9
fp(0, 2, 3) = 1.35974e10
fp(5, 1, 1) = 2.32177e10
fp(2, 2, 2) = 1.6123e10
fp(2, 2, 3) = 1.6245e10
fp(2, 2, 3) = 1.6245e10
fp(0, 3, 2) = 2.00789e10
fp(2, 1, 3) = 1.14266e10
fp(2, 1, 3) = 1.14266e10
fp(1, 3, 2) = 2.05649e10
fp(1, 2, 3) = 1.43053e10
fp(2, 3, 2) = 2.19584e10
fp(5, 0, 2) = 2.22932e10
fp(5, 1, 2) = 2.32687e10
fp(3, 3, 2) = 2.41027e10
fp(4, 2, 2) = 2.22932e10
fp(3, 3, 1) = 2.40534e10
fp(0, 3, 3) = 2.0177e10
fp(1, 3, 3) = 2.06607e10
fp(2, 3, 3) = 2.20482e10
fp(1, 3, 4) = 2.07941e10
fp(2, 3, 4) = 2.21733e10
fp(0, 3, 5) = 2.04879e10
fp(0, 3, 9) = 2.15407e10
fp(2, 1, 1) = 1.11466e10
ωp(0, 1, 1) =  # error: Эта переменная не определена.
fp(m, n, p) := c*sqrt((m/(2*a))^2 + (n/(2*b))^2 + (p/(2*l))^2)
ωp(0, 1, 1, εr) =  # error
ωp(1, 1, 1, εr) =  # error
ωp(m, n, p) := c/sqrt(ε0*μ0)*sqrt((m*π/a)^2 + (n*π/b)^2 + (p*π/l)^2)
fp(m, n, p) := c/(2*sqrt(εr*μr))*sqrt((m*π/a)^2 + (n*π/b)^2 + (p*π/l)^2)
fp(4, 4, 1) = 2.01449e10
fp(4, 4, 2) = 2.01682e10
fp(4, 4, 3) = 2.02068e10
fp(4, 4, 2) = 2.01682e10
fp(4, 5, 1) = 2.3743e10
fp(4, 5, 2) = 2.37627e10
fp(5, 4, 3) = 2.18746e10
fp(4, 5, 2) = 2.37627e10
fp(1, 5, 1) = 2.11367e10
fp(3, 5, 2) = 2.2585e10
fp(1, 5, 3) = 2.11956e10
fp(3, 5, 2) = 2.2585e10
fp(2, 5, 1) = 2.1683e10
fp(2, 5, 3) = 2.17405e10
fp(2, 5, 2) = 2.17046e10
fp(2, 5, 2) = 2.17046e10
fp(3, 5, 1) = 2.25642e10
fp(3, 5, 3) = 2.26195e10
fp(1, 5, 2) = 2.11588e10
fp(1, 5, 2) = 2.11588e10
fp(6, 3, 1) = 2.09514e10
fp(6, 3, 1) = 2.09514e10
fp(0, 5, 2) = 2.09737e10
fp(0, 5, 2) = 2.09737e10
fp(6, 4, 1) = 2.3702e10
fp(6, 4, 1) = 2.3702e10
fp(6, 4, 2) = 2.37217e10
fp(6, 4, 2) = 2.37217e10
fp(7, 1, 1) = 1.99992e10
fp(7, 1, 1) = 1.99992e10
fp(7, 2, 1) = 2.12746e10
fp(6, 3, 2) = 2.09737e10
fp(7, 2, 1) = 2.12746e10
fp(6, 3, 2) = 2.09737e10
fp(7, 3, 1) = 2.32452e10
fp(7, 3, 1) = 2.32452e10
fp(7, 1, 2) = 2.00226e10
fp(7, 1, 2) = 2.00226e10
fp(8, 1, 1) = 2.27364e10
fp(7, 2, 2) = 2.12966e10
fp(8, 1, 1) = 2.27364e10
fp(7, 2, 2) = 2.12966e10
fp(7, 3, 2) = 2.32653e10
fp(7, 3, 2) = 2.32653e10
fp(8, 2, 1) = 2.38659e10
fp(8, 2, 1) = 2.38659e10
fp(7, 4, 2) = 2.577e10
fp(7, 4, 2) = 2.577e10
fp(8, 1, 2) = 2.2757e10
fp(8, 1, 2) = 2.2757e10
fp(8, 2, 2) = 2.38855e10
fp(8, 2, 2) = 2.38855e10
