# Вариант 13. H03, LaAlO3, Au,Cu
# Rectangular waveguard
γ := -1000, -990 .. 1000
c := 3*10^8  # [m/s]
ε0 := 8.85*10^-12  # [F/m]
f := 1*10^9, 1.1*10^9 .. 300*10^9  # [Hz]
μr := 1
μ0 := 4*π*10^-7  # [H/m]
fc01 := 20*10^9  # [Hz]
fc02 := 25*10^9  # [Hz]
εr := 25
λc0 := c/fc01  # [m]
m := 0
n := 3
λ0(f) := c/f  # [m]
# Размеры волновода для основной моды H_03: | Размеры волновода для заданной моды:
λc0 = 0.015  # [m]
a := λc0*sqrt((m*π)^2 + (1.5*n*π)^2)/(2*π)  # [m]
a := λc0/2  # disabled  # [m]
a*10^2 =  # no stored result; disabled  # [cm]
b := a/1.5  # [m]
b := a/1.5  # disabled  # [m]
b*10^2 =  # no stored result; disabled  # [cm]
# Поперечное волновое число:
a*10^2 = 3.375  # [cm]
b*10^2 = 2.25  # [cm]
kt(m, n) := sqrt((m*π/a)^2 + (n*π/b)^2)  # [rad/m]
# Критическая длина волны для различных мод:
λc(m, n) := 2*π/kt(m, n)
# [m]
λc(0, 3) = 0.015
# Критическая частота для различных мод:
fc(m, n, εr) := c/(λc(m, n)*sqrt(εr*μr))  # [Hz]
fc(0, 3, 1)*10^-9 = 20
# Дисперсионное уравнение:
ωd(γ, m, n, εr) := sqrt((γ^2 + kt(m, n)^2)/(ε0*μ0*εr*μr))  # [rad/s]
2*π*fc01*10^-9 = 125.664
2*π*fc02*10^-9 = 157.08
fc01 = 20000000000
fc02 = 25000000000
# Подошедшие моды
fc(0, 3, 1) = 2e10
# Тут моды проверяю
fc(1, 3, 1) = 2.04879e10
fc(m, n, εr)
fc(2, 3, 1) = 2.18864e10
fc(2, 0, 1) = 8.88889e9
fc(4, 0, 1) = 1.77778e10
fc(6, 0, 1) = 2.66667e10
fc(3, 3, 1) = 2.4037e10
fc(0, 1, 1) = 6.66667e9
fc(2, 1, 1) = 1.11111e10
fc(4, 1, 1) = 1.89867e10
fc(6, 1, 1) = 2.74874e10
fc(0, 2, 1) = 1.33333e10
fc(4, 2, 1) = 2.22222e10
fc(2, 2, 1) = 1.60247e10
fc(6, 2, 1) = 2.98142e10
fc(4, 3, 1) = 2.67591e10
fc(5, 0, 1) = 2.22222e10
fc(6, 3, 1) = 3.33333e10
fc(0, 4, 1) = 2.66667e10
fc(2, 4, 1) = 2.81091e10
fc(4, 4, 1) = 3.20493e10
fc(5, 1, 1) = 2.32007e10
fc(6, 4, 1) = 3.77124e10
fc(0, 5, 1) = 3.33333e10
fc(2, 5, 1) = 3.44982e10
fc(4, 5, 1) = 3.77778e10
fc(6, 5, 1) = 4.26875e10
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fc(0, 6, 1) = 4e10
fc(2, 6, 1) = 4.09758e10
fc(4, 6, 1) = 4.37727e10
fc(6, 6, 1) = 4.8074e10
fc(1, 0, 1) = 4.44444e9
fc(3, 0, 1) = 1.33333e10
fc(1, 1, 1) = 8.01234e9
fc(3, 1, 1) = 1.49071e10
fc(1, 2, 1) = 1.40546e10
fc(3, 2, 1) = 1.88562e10
fc(5, 2, 1) = 2.59153e10
fc(5, 3, 1) = 2.98969e10
fc(1, 4, 1) = 2.70345e10
fc(3, 4, 1) = 2.98142e10
fc(5, 4, 1) = 3.47122e10
fc(1, 5, 1) = 3.36283e10
fc(3, 5, 1) = 3.59011e10
fc(5, 5, 1) = 4.00617e10
fc(1, 6, 1) = 4.02462e10
fc(3, 6, 1) = 4.21637e10
fc(5, 6, 1) = 4.57584e10
# Волновое сопротивление:
Z_H(f, m, n, εr) := 2*π*f*μ0*μr/sqrt((2*π*f)^2*ε0*μ0*εr*μr - kt(m, n)^2)  # [Ohm]
Z_E(f, m, n, εr) := sqrt((2*π*f)^2*ε0*μ0*εr*μr - kt(m, n)^2)/(2*π*f*ε0*εr)  # [Ohm]
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# Длина волны в волноводе:
λw(m, n, εr, f) := λ0(f)/(sqrt(εr*μr)*sqrt(1 - (λ0(f)/(sqrt(εr*μr)*λc(m, n)))^2))  # [m]
λw(0, 3, 25, 20*10^9) = 0.00306186
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# Фазовая скорость:
Vgr(m, n, εr, f) := sqrt((2*π*f)^2*ε0*μ0*εr*μr - kt(m, n)^2)/(ε0*μ0*εr*μr)  # disabled
Vph(m, n, εr, f) := λw(m, n, εr, f)*2*π*f/(2*π)  # [m/s]
# Групповая скорость:
Vgr(m, n, εr, f) := sqrt((2*π*f)^2*ε0*μ0*εr*μr - ((m*π/a)^2 + (n*π/b)^2))/(ε0*μ0*εr*μr)  # disabled
Vgr(m, n, εr, f) := c*sqrt(1 - (λ0(f)/(sqrt(εr*μr)*λc(m, n)))^2)/sqrt(εr*μr)  # [m/s]
Vgr(γ, m, n, εr) := d/dγ(ωd(γ, m, n, εr))  # disabled
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# Толщина скин-слоя:
δsk(f, σ) := sqrt(2/(2*π*f*μ0*σ))
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Rпов(f, σ) := 1/(δsk(f, σ)*σ)
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