Zвх := 50
Zн := 30
f := 3*10^9
h := 0.001
Er := 4
с := 3*10^8
Zтр := sqrt(Zвх*Zн) = 38.7298
Zтр2 := nthroot(Zвх*Zн^3, 4) = 34.0866
Zтр1 := nthroot(Zн*Zвх^3, 4) = 44.0056
лям0 := с/f = 0.1
А := Zтр/60*sqrt((Er + 1)/2) + (Er - 1)/(Er + 1)*(0.23 + 0.11/Er)
А = 1.17512
А1 := Zтр1/60*sqrt((Er + 1)/2) + (Er - 1)/(Er + 1)*(0.23 + 0.11/Er)
А1 = 1.31415
А2 := Zтр2/60*sqrt((Er + 1)/2) + (Er - 1)/(Er + 1)*(0.23 + 0.11/Er)
А2 = 1.05276
В := 60*π^2/(Zтр*sqrt(Er))
В = 7.64496
В1 := 60*π^2/(Zтр1*sqrt(Er))
В1 = 6.72842
В2 := 60*π^2/(Zтр2*sqrt(Er))
В2 = 8.68635
uu := h*8*e^А/(e^(2*А) - 2)
uu = 0.0030523
Eэф := (Er + 1)/2 + (Er - 1)/2*(1 + 10*h/uu)^(-1/2)
Eэф = 3.22537
лям := лям0/sqrt(Eэф)
лям = 0.0556814
Л := лям/4
Л = 0.0139203
uu1 := h*8*e^А1/(e^(2*А1) - 2)
uu1 = 0.00251242
uu2 := h*8*e^А2/(e^(2*А2) - 2)
uu2 = 0.00369071
Eэф1 := (Er + 1)/2 + (Er - 1)/2*(1 + 10*h/uu1)^(-1/2)
Eэф1 = 3.17215
лям1 := лям0/sqrt(Eэф1)
лям1 = 0.0561465
Л1 := лям1/4
Л1 = 0.0140366
Eэф2 := (Er + 1)/2 + (Er - 1)/2*(1 + 10*h/uu2)^(-1/2)
Eэф2 = 3.27881
лям2 := лям0/sqrt(Eэф2)
лям2 = 0.0552258
Л2 := лям2/4
Л2 = 0.0138064
